**
**
** COOK MEMBRANE USING CPE8R ELEMENTS
**
**
*Node, nset = nall
    1,  0., 44.00000, 0.
    2,  3., 45.0000, 0.
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*Element, elset=eall,type=CPE8R
    1,  27,  29,   3,   1,  28,  19,   2,  18
    2,  29,  31,   5,   3,  30,  20,   4,  19
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**
**
**
*Nset, nset=fixed
1,18,27,44,53,70
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** CORNER NODES
*Nset, nset=loadC1
17,225
*Nset, nset=loadC2
43,69,95,121,147,173,199
** MIDPOINT NODES
*Nset, nset=loadM
26,52,78,104,130,156,182,208
**
**
** MATERIAL DEFINITION
*Solid Section, elset=eall, material=linmat
1.
**
** MATERIAL
*Material, name=linmat
*elastic
200000., 0.33
*plastic
30.,0
1030.,1
**
**
** FIXED BCS
*Boundary
fixed,1,2
**
**
*STEP, nlgeom, inc=1000
*Static,
0.001,1,0.0001,1.
**
** BCs
*Boundary
loadC1, 2, 2, 10
*Boundary
loadC2, 2, 2, 10
*Boundary
loadM, 2, 2, 10
**
**
** HISTORY OUTPUT
*Output, field
*ELement output
S,E,PEEQ
*NODE output
U
** END OF STEP
*End step
**
